// SBML level 2 version 1
// DOQCS : http://doqcs.ncbs.res.in/
//    Accession Name = cAMP_pathway
//    Accession Number = 25
//    Transcriber = Upinder S. Bhalla, NCBS
//    Developer = Upinder S. Bhalla, NCBS
//    Species = Generic mammalian
//    Tissue = Brain - Neuronal
//    Cell Compartment = Cell membrane + Cytosol
//    Notes =  This is a model of the canonical cAMP signaling pathway:<br>Ligand->Receptor->G-protein->Cyclase->cAMP->PKA.<br>It also includes phosphodiesterases to balance out cAMP formation.<a href="http://www.ncbi.nlm.nih.gov/entrez/query.fcgi?cmd=Retrieve&db=pubmed&dopt=Abstract&list_uids=11665614&query_hl=5">Bhalla US Methods Enzymol. 2002;345:3-23</a>
//     Note: All the concentrations are in micro Mole (uM)

model testid()
  // cAMP_pathway
  // This is a model of the canonical cAMP signaling pathway:<br">Ligand->Receptor->G-protein->Cyclase->cAMP->PKA.<br>It also includes phosphodiesterases to balance out cAMP formation.<a href = http://www.ncbi.nlm.nih.gov/entrez/query.fcgi?cmd=Retrieve&db=pubmed&dopt=Abstract&list_uids=11665614&query_hl=5 >Bhalla US Methods Enzymol. 2002;345:3-23</a>

  // Compartments:
  compartment default_compartment = 1e-18;
  compartment geometry = 1e-12;

  // Species:
  species PKA_slash_R2C2 in geometry = 0.5;
  species PKA_slash_PKA_minus_inhibitor in geometry = 0.25;
  species PKA_slash_inhibited_minus_PKA in geometry = 0;
  species PKA_slash_cAMP_dot_R2C2 in geometry = 0;
  species PKA_slash_cAMP2_dot_R2C2 in geometry = 0;
  species PKA_slash_cAMP3_dot_R2C2 in geometry = 0;
  species PKA_slash_cAMP4_dot_R2C2 in geometry = 0;
  species PKA_slash_cAMP4_dot_R2C in geometry = 0;
  species PKA_slash_cAMP4_dot_R2 in geometry = 0;
  species cAMP in geometry = 0;
  species PKA_minus_active in geometry = 0;
  species PKA_minus_active_slash_phosph_minus_PDE_slash_phosph_minus_PDE_cplx in geometry = 0;
  species AC_slash_cAMP_minus_PDE in geometry = 0.5;
  species AC_slash_cAMP_minus_PDE_slash_PDE_slash_PDE_cplx in geometry = 0;
  species AC_slash_cAMP_minus_PDE_star_ in geometry = 0;
  species AC_slash_cAMP_minus_PDE_star__slash_PDE_star__slash_PDE_star__cplx in geometry = 0;
  species AC_slash_Gs_dot_AC in geometry = 0;
  species AC_slash_AC in geometry = 0.015;
  species GTP_dot_Ga in geometry = 0;
  species Gs_slash_R in geometry = 0.08333333;
  species Gs_slash_L_dot_R in geometry = 0;
  species Gs_slash_GDP_dot_Gabc in geometry = 1;
  species Gs_slash_L_dot_R_dot_GDP_dot_Gabc in geometry = 0;
  species Gs_slash_GDP_dot_Ga in geometry = 0;
  species Gs_slash_Gbg in geometry = 0;
  species Gs_slash_R_dot_GDP_dot_Gabc in geometry = 0;
  // ATP is present in all cells between 2 and 10 mM. See Lehninger. It is assumed buffered since the metabolic activity will take care of its levels.
  species $AC_slash_ATP in geometry = 5000;
  // Assumed buffered to 1 mM. Value is irrelevant to simulation.
  species $AC_slash_AMP in geometry = 1000;
  // This ligand could be any of several which bind to the beta adrenergic receptor and other G-protein coupled receptors which activate AC. For the sake of argument, call it isoproterenol.
  species $Gs_slash_L in geometry = 0.01;

  // Reactions:
  // kf*PKA_slash_R2C2*cAMP-kb*PKA_slash_cAMP_dot_R2C2
  // Hasler et al FASEB J 6:2734-2741 1992 say Kd =1e-7M for type II, 5.6e-8 M for type I. Take mean which comes to 2e-13 #/cell Smith et al PNAS USA 78:3 1591-1595 1981 have better data. First kf/kb=2.1e7/M = 3.5e-5 (#/cell). Ogreid and Doskeland Febs Lett 129:2 287-292 1981 have figs suggesting time course of complete assoc is < 1 min.
  PKA_slash_cAMP_minus_bind_minus_site_minus_B1: PKA_slash_R2C2 + cAMP -> PKA_slash_cAMP_dot_R2C2; PKA_slash_cAMP_minus_bind_minus_site_minus_B1_kf*PKA_slash_R2C2*cAMP - PKA_slash_cAMP_minus_bind_minus_site_minus_B1_kb*PKA_slash_cAMP_dot_R2C2;
    PKA_slash_cAMP_minus_bind_minus_site_minus_B1_kf = 5.4e-11 vol_uMINVsecINV; PKA_slash_cAMP_minus_bind_minus_site_minus_B1_kb = 3.3e-11 vol_secINV;
  // kf*PKA_slash_cAMP_dot_R2C2*cAMP-kb*PKA_slash_cAMP2_dot_R2C2
  // For now let us set this to the same Km (1e-7M) as site B. This gives kf/kb = .7e-7M * 1e6 / (6e5^2) : 1/(6e5^2) = 2e-13:2.77e-12 Smith et al have better values. They say that this is cooperative, so the consts are now kf/kb =8.3e-4
  PKA_slash_cAMP_minus_bind_minus_site_minus_B2: PKA_slash_cAMP_dot_R2C2 + cAMP -> PKA_slash_cAMP2_dot_R2C2; PKA_slash_cAMP_minus_bind_minus_site_minus_B2_kf*PKA_slash_cAMP_dot_R2C2*cAMP - PKA_slash_cAMP_minus_bind_minus_site_minus_B2_kb*PKA_slash_cAMP2_dot_R2C2;
    PKA_slash_cAMP_minus_bind_minus_site_minus_B2_kf = 5.4e-11 vol_uMINVsecINV; PKA_slash_cAMP_minus_bind_minus_site_minus_B2_kb = 3.3e-11 vol_secINV;
  // kf*PKA_slash_cAMP2_dot_R2C2*cAMP-kb*PKA_slash_cAMP3_dot_R2C2
  PKA_slash_cAMP_minus_bind_minus_site_minus_A1: PKA_slash_cAMP2_dot_R2C2 + cAMP -> PKA_slash_cAMP3_dot_R2C2; PKA_slash_cAMP_minus_bind_minus_site_minus_A1_kf*PKA_slash_cAMP2_dot_R2C2*cAMP - PKA_slash_cAMP_minus_bind_minus_site_minus_A1_kb*PKA_slash_cAMP3_dot_R2C2;
    PKA_slash_cAMP_minus_bind_minus_site_minus_A1_kf = 7.5e-11 vol_uMINVsecINV; PKA_slash_cAMP_minus_bind_minus_site_minus_A1_kb = 1.1e-10 vol_secINV;
  // kf*cAMP*PKA_slash_cAMP3_dot_R2C2-kb*PKA_slash_cAMP4_dot_R2C2
  PKA_slash_cAMP_minus_bind_minus_site_minus_A2: cAMP + PKA_slash_cAMP3_dot_R2C2 -> PKA_slash_cAMP4_dot_R2C2; PKA_slash_cAMP_minus_bind_minus_site_minus_A2_kf*cAMP*PKA_slash_cAMP3_dot_R2C2 - PKA_slash_cAMP_minus_bind_minus_site_minus_A2_kb*PKA_slash_cAMP4_dot_R2C2;
    PKA_slash_cAMP_minus_bind_minus_site_minus_A2_kf = 7.5e-11 vol_uMINVsecINV; PKA_slash_cAMP_minus_bind_minus_site_minus_A2_kb = 3.25e-11 vol_secINV;
  // kf*PKA_slash_cAMP4_dot_R2C2-kb*PKA_minus_active*PKA_slash_cAMP4_dot_R2C
  // This has to be fast, as the activation of PKA by cAMP is also fast. kf was 10
  PKA_slash_Release_minus_C1: PKA_slash_cAMP4_dot_R2C2 -> PKA_minus_active + PKA_slash_cAMP4_dot_R2C; PKA_slash_Release_minus_C1_kf*PKA_slash_cAMP4_dot_R2C2 - PKA_slash_Release_minus_C1_kb*PKA_minus_active*PKA_slash_cAMP4_dot_R2C;
    PKA_slash_Release_minus_C1_kf = 6e-11 vol_secINV; PKA_slash_Release_minus_C1_kb = 1.8e-11 vol_uMINVsecINV;
  // kf*PKA_slash_cAMP4_dot_R2C-kb*PKA_minus_active*PKA_slash_cAMP4_dot_R2
  PKA_slash_Release_minus_C2: PKA_slash_cAMP4_dot_R2C -> PKA_minus_active + PKA_slash_cAMP4_dot_R2; PKA_slash_Release_minus_C2_kf*PKA_slash_cAMP4_dot_R2C - PKA_slash_Release_minus_C2_kb*PKA_minus_active*PKA_slash_cAMP4_dot_R2;
    PKA_slash_Release_minus_C2_kf = 6e-11 vol_secINV; PKA_slash_Release_minus_C2_kb = 1.8e-11 vol_uMINVsecINV;
  // kf*PKA_minus_active*PKA_slash_PKA_minus_inhibitor-kb*PKA_slash_inhibited_minus_PKA
  // This has to be set to zero for matching the expts in vitro. In vivo we need to consider the inhibition though.
  PKA_slash_inhib_minus_PKA: PKA_minus_active + PKA_slash_PKA_minus_inhibitor -> PKA_slash_inhibited_minus_PKA; PKA_slash_inhib_minus_PKA_kf*PKA_minus_active*PKA_slash_PKA_minus_inhibitor - PKA_slash_inhib_minus_PKA_kb*PKA_slash_inhibited_minus_PKA;
    PKA_slash_inhib_minus_PKA_kf = 6e-11 vol_uMINVsecINV; PKA_slash_inhib_minus_PKA_kb = 1e-12 vol_secINV;
  // kf*AC_slash_cAMP_minus_PDE_star_-kb*AC_slash_cAMP_minus_PDE
  // The rates for this are poorly constrained. In adipocytes (probably a different PDE) the dephosphorylation is complete within 15 min, but there are no intermediate time points so it could be much faster. Identity of phosphatase etc is still unknown.
  AC_slash_dephosph_minus_PDE: AC_slash_cAMP_minus_PDE_star_ -> AC_slash_cAMP_minus_PDE; AC_slash_dephosph_minus_PDE_kf*AC_slash_cAMP_minus_PDE_star_ - AC_slash_dephosph_minus_PDE_kb*AC_slash_cAMP_minus_PDE;
    AC_slash_dephosph_minus_PDE_kf = 1e-13 vol_secINV; AC_slash_dephosph_minus_PDE_kb = 0 vol_secINV;
  // kf*AC_slash_AC*GTP_dot_Ga-kb*AC_slash_Gs_dot_AC
  // Half-max at around 3nM = kb/kf from fig 5 in Feinstein et al PNAS USA 88 10173-10177 1991 kf = kb/1800 = 5.56e-4 kb Ofer Jacobowitz thesis (Mount Sinai 1995) data indicates it is more like 2 nM.
  AC_slash_Gs_minus_bind_minus_AC: AC_slash_AC + GTP_dot_Ga -> AC_slash_Gs_dot_AC; AC_slash_Gs_minus_bind_minus_AC_kf*AC_slash_AC*GTP_dot_Ga - AC_slash_Gs_minus_bind_minus_AC_kb*AC_slash_Gs_dot_AC;
    AC_slash_Gs_minus_bind_minus_AC_kf = 4.99998e-10 vol_uMINVsecINV; AC_slash_Gs_minus_bind_minus_AC_kb = 1e-12 vol_secINV;
  // kf*Gs_slash_R*Gs_slash_L-kb*Gs_slash_L_dot_R
  // Ligand binding to receptor. From Gether et al JBC 270:28268-28275 (1995) the binding to the purified receptor is at about 1 uM, but the conformational change only happens at 30 uM. We\'ll take 1 uM for this, since it is already much weaker binding than to the R.Gs complex. The time-course from this paper appears remarkably slow, based on physiological data I estimate more like 10 sec.
  Gs_slash_L_minus_bind_minus_R: Gs_slash_R + $Gs_slash_L -> Gs_slash_L_dot_R; Gs_slash_L_minus_bind_minus_R_kf*Gs_slash_R*Gs_slash_L - Gs_slash_L_minus_bind_minus_R_kb*Gs_slash_L_dot_R;
    Gs_slash_L_minus_bind_minus_R_kf = 1.00002e-13 vol_uMINVsecINV; Gs_slash_L_minus_bind_minus_R_kb = 1e-13 vol_secINV;
  // kf*Gs_slash_L_dot_R_dot_GDP_dot_Gabc-kb*Gs_slash_Gbg*Gs_slash_L_dot_R*GTP_dot_Ga
  // This step combines several stages in GTP.Galpha release. From Berstein et al activation is at .35 - 0.7/min From Fay et al Biochem 30 5066-5075 1991 kf = .01/sec. From Brandt and Ross JBC 261(4):1656-1664 (1986) and Ransan et al Biochem J 283(2):519-524 (1992) rates around 2.5/min to 1.5/min are better.
  Gs_slash_Activate_minus_Gs: Gs_slash_L_dot_R_dot_GDP_dot_Gabc -> Gs_slash_Gbg + Gs_slash_L_dot_R + GTP_dot_Ga; Gs_slash_Activate_minus_Gs_kf*Gs_slash_L_dot_R_dot_GDP_dot_Gabc - Gs_slash_Activate_minus_Gs_kb*Gs_slash_Gbg*Gs_slash_L_dot_R*GTP_dot_Ga;
    Gs_slash_Activate_minus_Gs_kf = 2.5e-14 vol_secINV; Gs_slash_Activate_minus_Gs_kb = 0 vol_uMINV2secINV;
  // kf*Gs_slash_GDP_dot_Ga*Gs_slash_Gbg-kb*Gs_slash_GDP_dot_Gabc
  // Negligible back-reaction.
  Gs_slash_Trimerize_minus_Gs: Gs_slash_GDP_dot_Ga + Gs_slash_Gbg -> Gs_slash_GDP_dot_Gabc; Gs_slash_Trimerize_minus_Gs_kf*Gs_slash_GDP_dot_Ga*Gs_slash_Gbg - Gs_slash_Trimerize_minus_Gs_kb*Gs_slash_GDP_dot_Gabc;
    Gs_slash_Trimerize_minus_Gs_kf = 6e-12 vol_uMINVsecINV; Gs_slash_Trimerize_minus_Gs_kb = 0 vol_secINV;
  // kf*GTP_dot_Ga-kb*Gs_slash_GDP_dot_Ga
  // From Brandt and Ross JBC 261(4):1656-1664, rate is 4/min and is agonist independent. I treat this as irreversible.
  Gs_slash_GTPase: GTP_dot_Ga -> Gs_slash_GDP_dot_Ga; Gs_slash_GTPase_kf*GTP_dot_Ga - Gs_slash_GTPase_kb*Gs_slash_GDP_dot_Ga;
    Gs_slash_GTPase_kf = 6.6667e-14 vol_secINV; Gs_slash_GTPase_kb = 0 vol_secINV;
  // kf*Gs_slash_L*Gs_slash_R_dot_GDP_dot_Gabc-kb*Gs_slash_L_dot_R_dot_GDP_dot_Gabc
  // From Seifert et al Mol. Pharmacol 56:348-358 (1999) The EC50 for ISO is about 20 nM.
  Gs_slash_L_minus_bind_minus_R_dot_Gabc: $Gs_slash_L + Gs_slash_R_dot_GDP_dot_Gabc -> Gs_slash_L_dot_R_dot_GDP_dot_Gabc; Gs_slash_L_minus_bind_minus_R_dot_Gabc_kf*Gs_slash_L*Gs_slash_R_dot_GDP_dot_Gabc - Gs_slash_L_minus_bind_minus_R_dot_Gabc_kb*Gs_slash_L_dot_R_dot_GDP_dot_Gabc;
    Gs_slash_L_minus_bind_minus_R_dot_Gabc_kf = 4.99998e-12 vol_uMINVsecINV; Gs_slash_L_minus_bind_minus_R_dot_Gabc_kb = 1e-13 vol_secINV;
  // kf*Gs_slash_GDP_dot_Gabc*Gs_slash_R-kb*Gs_slash_R_dot_GDP_dot_Gabc
  // Receptor binding to Gs. Scale it to the same slow rates described by Fay et al for L.R to L.R.G. From detailed balance, Kd is 50.
  Gs_slash_R_minus_bind_minus_Gabc: Gs_slash_GDP_dot_Gabc + Gs_slash_R -> Gs_slash_R_dot_GDP_dot_Gabc; Gs_slash_R_minus_bind_minus_Gabc_kf*Gs_slash_GDP_dot_Gabc*Gs_slash_R - Gs_slash_R_minus_bind_minus_Gabc_kb*Gs_slash_R_dot_GDP_dot_Gabc;
    Gs_slash_R_minus_bind_minus_Gabc_kf = 1.99998e-13 vol_uMINVsecINV; Gs_slash_R_minus_bind_minus_Gabc_kb = 1e-13 vol_secINV;
  // kf*Gs_slash_GDP_dot_Gabc*Gs_slash_L_dot_R-kb*Gs_slash_L_dot_R_dot_GDP_dot_Gabc
  // See Fay et al Biochem 30 5066-5075 1991. kf is 0.01/sec but does not account for Gs levels. kb is 0.0001/sec. The fraction of RG is about 50%, so we can estimate Kd at about the same as for Gs basal levels. This rate has to be faster since it has to feed GTP.Ga into the system faster than the GTPase. Waldhoer et al Mol Pharmacol 53:808-818 1988 say affinity for A1adenosine/Gi is 10 nM.
  Gs_slash_L_dot_R_minus_bind_minus_Gabc: Gs_slash_GDP_dot_Gabc + Gs_slash_L_dot_R -> Gs_slash_L_dot_R_dot_GDP_dot_Gabc; Gs_slash_L_dot_R_minus_bind_minus_Gabc_kf*Gs_slash_GDP_dot_Gabc*Gs_slash_L_dot_R - Gs_slash_L_dot_R_minus_bind_minus_Gabc_kb*Gs_slash_L_dot_R_dot_GDP_dot_Gabc;
    Gs_slash_L_dot_R_minus_bind_minus_Gabc_kf = 1.00002e-11 vol_uMINVsecINV; Gs_slash_L_dot_R_minus_bind_minus_Gabc_kb = 1e-13 vol_secINV;
  // k1*AC_slash_cAMP_minus_PDE*PKA_minus_active-k2*PKA_minus_active_slash_phosph_minus_PDE_slash_phosph_minus_PDE_cplx
  // See Bramson et al CRC crit rev Biochem 15:2 93-124. The rates there are for peptide substrates and too fast. Scaled down by a factor of 3 as per Cohen et al FEBS Lett 76:182-86 (1977).
  PKA_minus_active_slash_phosph_minus_PDE_1: AC_slash_cAMP_minus_PDE + PKA_minus_active -> PKA_minus_active_slash_phosph_minus_PDE_slash_phosph_minus_PDE_cplx; PKA_minus_active_slash_phosph_minus_PDE_1_k1*AC_slash_cAMP_minus_PDE*PKA_minus_active - PKA_minus_active_slash_phosph_minus_PDE_1_k2*PKA_minus_active_slash_phosph_minus_PDE_slash_phosph_minus_PDE_cplx;
    PKA_minus_active_slash_phosph_minus_PDE_1_k1 = 6e-12 vol_uMINVsecINV; PKA_minus_active_slash_phosph_minus_PDE_1_k2 = 3.6e-11 vol_secINV;
  // k3*PKA_minus_active_slash_phosph_minus_PDE_slash_phosph_minus_PDE_cplx
  PKA_minus_active_slash_phosph_minus_PDE_2: PKA_minus_active_slash_phosph_minus_PDE_slash_phosph_minus_PDE_cplx => AC_slash_cAMP_minus_PDE_star_ + PKA_minus_active; PKA_minus_active_slash_phosph_minus_PDE_2_k3*PKA_minus_active_slash_phosph_minus_PDE_slash_phosph_minus_PDE_cplx;
    PKA_minus_active_slash_phosph_minus_PDE_2_k3 = 9e-12 vol_secINV;
  // k1*cAMP*AC_slash_cAMP_minus_PDE-k2*AC_slash_cAMP_minus_PDE_slash_PDE_slash_PDE_cplx
  // Best rates are from Conti et al Biochem 34 7979-7987 1995. Though these are for the Sertoli cell form, it looks like they carry nicely into alternatively spliced brain form. See Sette et al JBC 269:28 18271-18274 Km ~2 uM, Vmax est ~ 10 umol/min/mg for pure form. Brain protein is 93 kD but this was 67. So k3 ~10, k2 ~40, k1 ~4.2e-6
  AC_slash_cAMP_minus_PDE_slash_PDE_1: cAMP + AC_slash_cAMP_minus_PDE -> AC_slash_cAMP_minus_PDE_slash_PDE_slash_PDE_cplx; AC_slash_cAMP_minus_PDE_slash_PDE_1_k1*cAMP*AC_slash_cAMP_minus_PDE - AC_slash_cAMP_minus_PDE_slash_PDE_1_k2*AC_slash_cAMP_minus_PDE_slash_PDE_slash_PDE_cplx;
    AC_slash_cAMP_minus_PDE_slash_PDE_1_k1 = 2.52e-12 vol_uMINVsecINV; AC_slash_cAMP_minus_PDE_slash_PDE_1_k2 = 4e-11 vol_secINV;
  // k3*AC_slash_cAMP_minus_PDE_slash_PDE_slash_PDE_cplx
  AC_slash_cAMP_minus_PDE_slash_PDE_2: AC_slash_cAMP_minus_PDE_slash_PDE_slash_PDE_cplx => AC_slash_cAMP_minus_PDE; AC_slash_cAMP_minus_PDE_slash_PDE_2_k3*AC_slash_cAMP_minus_PDE_slash_PDE_slash_PDE_cplx;
    AC_slash_cAMP_minus_PDE_slash_PDE_2_k3 = 1e-11 vol_secINV;
  // k1*cAMP*AC_slash_cAMP_minus_PDE_star_-k2*AC_slash_cAMP_minus_PDE_star__slash_PDE_star__slash_PDE_star__cplx
  // This form has about twice the activity of the unphosphorylated form. See Sette et al JBC 269:28 18271-18274 1994. We\'ll ignore cGMP effects for now.
  AC_slash_cAMP_minus_PDE_star__slash_PDE_star__1: cAMP + AC_slash_cAMP_minus_PDE_star_ -> AC_slash_cAMP_minus_PDE_star__slash_PDE_star__slash_PDE_star__cplx; AC_slash_cAMP_minus_PDE_star__slash_PDE_star__1_k1*cAMP*AC_slash_cAMP_minus_PDE_star_ - AC_slash_cAMP_minus_PDE_star__slash_PDE_star__1_k2*AC_slash_cAMP_minus_PDE_star__slash_PDE_star__slash_PDE_star__cplx;
    AC_slash_cAMP_minus_PDE_star__slash_PDE_star__1_k1 = 5.04e-12 vol_uMINVsecINV; AC_slash_cAMP_minus_PDE_star__slash_PDE_star__1_k2 = 8e-11 vol_secINV;
  // k3*AC_slash_cAMP_minus_PDE_star__slash_PDE_star__slash_PDE_star__cplx
  AC_slash_cAMP_minus_PDE_star__slash_PDE_star__2: AC_slash_cAMP_minus_PDE_star__slash_PDE_star__slash_PDE_star__cplx => AC_slash_cAMP_minus_PDE_star_; AC_slash_cAMP_minus_PDE_star__slash_PDE_star__2_k3*AC_slash_cAMP_minus_PDE_star__slash_PDE_star__slash_PDE_star__cplx;
    AC_slash_cAMP_minus_PDE_star__slash_PDE_star__2_k3 = 2e-11 vol_secINV;
  // kcat*AC_slash_Gs_dot_AC*AC_slash_ATP/(Km+AC_slash_ATP)
  // See Feinstein et al PNAS 88:10173-10177, Jacobowitz et al JBC 286(6):3829-3832 Smigel, JBC 261(4):1976-1982 (1986)
  AC_slash_Gs_dot_AC_slash_cyclase: $AC_slash_ATP => cAMP; kcat*AC_slash_Gs_dot_AC*AC_slash_ATP/(Km + AC_slash_ATP);  // modifiers: AC_slash_Gs_dot_AC
    kcat = 1.8e-11 vol_secINV; Km = 20 uM1;

  // Unit definitions:
  unit uM1 = 1e-6 mole / litre;
  unit vol_secINV = litre / second;
  unit vol_uMINV2secINV = litre^3 / ((1e-6 mole)^2 * second);
  unit vol_uMINVsecINV = litre^2 / (1e-6 mole * second);
  unit substance = 1e-6 mole;
end
